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/batch
! ANSYS input file written by Workbench version 18.1 RELEASE
! File used for geometry attach: C:\NDCSI\workbench\real_test_case_v1_files\dp0\Geom\DM\Geom.agdb
/title,real_test_case_v1--Static Structural (B5)
/com,--- Data in consistent NMM units. See Solving Units in the help system for more information.
/units,MPA
/prep7
! Turn off shape checking because checks already performed inside WB mesher.
! See help system for more information.
SHPP,OFF,,NOWARN
etcon,set             ! allow ANSYS to choose best KEYOP's for 180x elements
/com,*********** Nodes for the whole assembly ***********
nblock,3,,21595
(1i9,3e20.9e3)
        1    6.093440056E+002    4.184485959E+000    1.499416179E+002
        2    6.153435445E+002    2.684393599E+000    1.499766680E+002
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-1
/com,*********** Elements for Body 1 "disc" ***********
et,1,187
eblock,19,solid,,4894
(19i9)
        1        1        1        1        0        0        0        0       10        0        1      369     2364     2365     2552     5436    16460     5437     5438
    16464    16468
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-1
/com,*********** Elements for Body 2 "blade" ***********
et,2,187
eblock,19,solid,,5729
(19i9)
        2        2        1        2        0        0        0        0       10        0     4895      887     3200      909     2153     8653     8826     8647     8651
    15369     8824
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-1
/com,*********** Send User Defined Coordinate System(s) ***********
local,12,1,0.,0.,0.,0.,0.,90.
csys,0
toffst,273.15,  ! Temperature offset from absolute zero
/com,*********** Set Reference Temperature ***********
tref,22.
/com,*********** Send Materials ***********
MP,DENS,1,7.85e-09,	! tonne mm^-3
MP,ALPX,1,1.2e-05,	! C^-1
MP,C,1,434000000,	! mm^2 s^-2 C^-1
MP,KXX,1,60.5,	! tonne mm s^-3 C^-1
MP,RSVX,1,0.00017,	! ohm mm
MP,EX,1,200000,	! tonne s^-2 mm^-1
MP,NUXY,1,0.3,
MP,MURX,1,10000,

MP,DENS,2,7.85e-09,	! tonne mm^-3
MP,ALPX,2,1.2e-05,	! C^-1
MP,C,2,434000000,	! mm^2 s^-2 C^-1
MP,KXX,2,60.5,	! tonne mm s^-3 C^-1
MP,RSVX,2,0.00017,	! ohm mm
MP,EX,2,200000,	! tonne s^-2 mm^-1
MP,NUXY,2,0.3,
MP,MURX,2,10000,

!************************* Model Summary ********************
!disc,	Structural Steel,	matid,	1
!blade,	Structural Steel,	matid,	2
!************************* End Model Summary ********************
/com,*********** Create Contact "Contact Region" ***********
*set,tid,4
*set,cid,3
r,tid
r,cid
et,tid,170
et,cid,174
eblock,10,,,408
(15i9)
    10624        4        4        4        0      336     2007      403      403     5280     5610      403     5279
    10625        4        4        4        0      316      321     2003     2003     5171     5198     2003     5173
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-1
eblock,10,,,408
(15i9)
    11032        3        3        3        0      336     2007      403      403     5280     5610      403     5279
    11033        3        3        3        0      316      321     2003     2003     5171     5198     2003     5173
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-1
eblock,10,,,466
(15i9)
    11440        3        4        3        0     1030     1064     1036     1036     9644     9698     1036     9641
    11441        3        4        3        0     1031     1065     1037     1037     9654     9705     1037     9651
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-1
eblock,10,,,466
(15i9)
    11906        4        3        4        0     1030     1064     1036     1036     9644     9698     1036     9641
    11907        4        3        4        0     1031     1065     1037     1037     9654     9705     1037     9651
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-1
keyo,cid,8,2               ! auto create asymmetric contact (from Program Controlled setting)
keyo,cid,10,0              ! adjust contact stiffness each NR iteration (from Program Controlled setting)
keyo,cid,12,5              ! bonded always
keyo,cid,2,0               ! augmented Lagrange (from Program Controlled setting)
keyo,cid,4,0               ! on Gauss point (from Program Controlled setting)
keyo,cid,9,1               ! ignore initial gaps/penetration
keyo,cid,7,0               ! No Prediction
rmod,tid,3,10.	! FKN
rmod,tid,5,0.	! ICONT
rmod,tid,6,0.	! PINB
rmod,tid,10,0.	! CNOF
rmod,tid,12,0.	! FKT
rmod,tid,36,71	! WB DSID
rmod,cid,3,10.	! FKN
rmod,cid,5,0.	! ICONT
rmod,cid,6,0.	! PINB
rmod,cid,10,0.	! CNOF
rmod,cid,12,0.	! FKT
rmod,cid,36,71	! WB DSID
nsel,all
esel,all
/com,*********** Send Named Selection as Node Component ***********
CMBLOCK,LOW     ,NODE,     1018
(8i10)
         1         2         3         4         5         6         7         8
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/com,*********** Send Named Selection as Node Component ***********
CMBLOCK,HIGH    ,NODE,     1018
(8i10)
       116       119       120       121       122       123       124       125
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/com,*********** Send Named Selection as Node Component ***********
CMBLOCK,DIRICHLET,NODE,       31
(8i10)
         1         2         3       237       238       239       240       241
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/com,*********** Send Named Selection as Node Component ***********
CMBLOCK,TOP_LOW ,NODE,       96
(8i10)
       554       559       560       561       562       563       564       565
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
/com,*********** Send Named Selection as Node Component ***********
CMBLOCK,TOP_HIGH,NODE,       99
(8i10)
       544       545       546       547       548       549       550       551
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/com,*********** Fixed Supports ***********
CMBLOCK,_FIXEDSU,NODE,       31
(8i10)
         1         2         3       237       238       239       240       241
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cmsel,s,_FIXEDSU
d,all,all
nsel,all
/com,*********** Node Rotations ***********
nmod,116,,,,0.,2.5,0.
nmod,119,,,,0.,2.5,0.
nmod,120,,,,0.,2.5,0.
nmod,121,,,,0.,2.5,0.
nmod,122,,,,0.,2.5,0.
nmod,123,,,,0.,2.5,0.
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nmod,16261,,,,0.,2.5,0.
/com,*********** Define Force Using Surface Effect Elements ***********
local,13,0,0.,0.,0.,-0.,0.,0.
csys,0
et,5,154
eblock,10,,,37
(15i9)
    12372        5        5        5       13      614      650      636      636     7074     7241      636     7072
    12373        5        5        5       13      618      652      651      651     7106     7295      651     7105
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-1
esel,s,type,,5
keyop,5,2,1                ! Apply load in local coordinate system
keyop,5,7,1                ! Use original area so load is constant in large deformation
keyop,5,11,2               ! Use real and not project area
esel,all

*DIM,_loadvari63x,TABLE,2,1,1,TIME,
! Time values
_loadvari63x(1,0,1) = 0.
_loadvari63x(2,0,1) = 1.
! Load values
_loadvari63x(1,1,1) = 0.
_loadvari63x(2,1,1) = 0.


*DIM,_loadvari63y,TABLE,2,1,1,TIME,
! Time values
_loadvari63y(1,0,1) = 0.
_loadvari63y(2,0,1) = 1.
! Load values
_loadvari63y(1,1,1) = 0.
_loadvari63y(2,1,1) = 0.


*DIM,_loadvari63z,TABLE,2,1,1,TIME,
! Time values
_loadvari63z(1,0,1) = 0.
_loadvari63z(2,0,1) = 1.
! Load values
_loadvari63z(1,1,1) = 0.
_loadvari63z(2,1,1) = 1.76070855785147e-002

/com,*********** Create Periodic/Cyclic Symmetry ***********
CYCOPT,USRROT,1
CYCOPT,STATUS
*DIM,_CYCLICMAP,ARRAY,2,1018
*SET,_CYCLICMAP(1,1),1,240
*SET,_CYCLICMAP(1,2),2,237
*SET,_CYCLICMAP(1,3),3,241
*SET,_CYCLICMAP(1,4),4,116
*SET,_CYCLICMAP(1,5),5,119
*SET,_CYCLICMAP(1,6),6,132
*SET,_CYCLICMAP(1,7),7,131
*SET,_CYCLICMAP(1,8),8,130
*SET,_CYCLICMAP(1,9),9,129
*SET,_CYCLICMAP(1,10),10,128
*SET,_CYCLICMAP(1,11),11,127
*SET,_CYCLICMAP(1,12),12,126
*SET,_CYCLICMAP(1,13),13,125
*SET,_CYCLICMAP(1,14),14,124
*SET,_CYCLICMAP(1,15),15,123
*SET,_CYCLICMAP(1,16),16,122
*SET,_CYCLICMAP(1,17),17,121
*SET,_CYCLICMAP(1,18),18,120
*SET,_CYCLICMAP(1,19),19,141
*SET,_CYCLICMAP(1,20),20,390
*SET,_CYCLICMAP(1,21),21,389
*SET,_CYCLICMAP(1,22),22,136
*SET,_CYCLICMAP(1,23),23,144
*SET,_CYCLICMAP(1,24),24,145
*SET,_CYCLICMAP(1,25),25,388
*SET,_CYCLICMAP(1,26),26,387
*SET,_CYCLICMAP(1,27),27,386
*SET,_CYCLICMAP(1,28),28,385
*SET,_CYCLICMAP(1,29),29,384
*SET,_CYCLICMAP(1,30),30,383
*SET,_CYCLICMAP(1,31),31,382
*SET,_CYCLICMAP(1,32),32,149
*SET,_CYCLICMAP(1,33),33,160
*SET,_CYCLICMAP(1,34),34,159
*SET,_CYCLICMAP(1,35),35,158
*SET,_CYCLICMAP(1,36),36,157
*SET,_CYCLICMAP(1,37),37,156
*SET,_CYCLICMAP(1,38),38,155
*SET,_CYCLICMAP(1,39),39,154
*SET,_CYCLICMAP(1,40),40,153
*SET,_CYCLICMAP(1,41),41,152
*SET,_CYCLICMAP(1,42),42,151
*SET,_CYCLICMAP(1,43),43,150
*SET,_CYCLICMAP(1,44),44,380
*SET,_CYCLICMAP(1,45),45,381
*SET,_CYCLICMAP(1,46),46,298
*SET,_CYCLICMAP(1,47),47,302
*SET,_CYCLICMAP(1,48),48,303
*SET,_CYCLICMAP(1,49),49,304
*SET,_CYCLICMAP(1,50),50,305
*SET,_CYCLICMAP(1,51),51,306
*SET,_CYCLICMAP(1,52),52,307
*SET,_CYCLICMAP(1,53),53,308
*SET,_CYCLICMAP(1,54),54,309
*SET,_CYCLICMAP(1,55),55,310
*SET,_CYCLICMAP(1,56),56,327
*SET,_CYCLICMAP(1,57),57,374
*SET,_CYCLICMAP(1,58),58,373
*SET,_CYCLICMAP(1,59),59,372
*SET,_CYCLICMAP(1,60),60,371
*SET,_CYCLICMAP(1,61),61,379
*SET,_CYCLICMAP(1,62),62,378
*SET,_CYCLICMAP(1,63),63,377
*SET,_CYCLICMAP(1,64),64,376
*SET,_CYCLICMAP(1,65),65,375
*SET,_CYCLICMAP(1,66),66,184
*SET,_CYCLICMAP(1,67),67,328
*SET,_CYCLICMAP(1,68),68,329
*SET,_CYCLICMAP(1,69),69,330
*SET,_CYCLICMAP(1,70),70,331
*SET,_CYCLICMAP(1,71),71,332
*SET,_CYCLICMAP(1,72),72,333
*SET,_CYCLICMAP(1,73),73,334
*SET,_CYCLICMAP(1,74),74,335
*SET,_CYCLICMAP(1,75),75,179
*SET,_CYCLICMAP(1,76),76,193
*SET,_CYCLICMAP(1,77),77,188
*SET,_CYCLICMAP(1,78),78,207
*SET,_CYCLICMAP(1,79),79,206
*SET,_CYCLICMAP(1,80),80,205
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*SET,_CYCLICMAP(1,1018),17423,15989
CYCLIC,144,,12,,,_CYCLICMAP
fini
/com,****************************************************************************
/com,*************************    SOLUTION       ********************************
/com,****************************************************************************
