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/batch
! ANSYS input file written by Workbench version 18.1 RELEASE
! File used for geometry attach: C:\NDCSI\workbench\simple_blade_disc_files\dp0\Geom\DM\Geom.agdb
/title,simple_blade_disc--Modal (B5)
/com,--- Data in consistent NMM units. See Solving Units in the help system for more information.
/units,MPA
/prep7
! Turn off shape checking because checks already performed inside WB mesher.
! See help system for more information.
SHPP,OFF,,NOWARN
etcon,set             ! allow ANSYS to choose best KEYOP's for 180x elements
/com,*********** Nodes for the whole assembly ***********
nblock,3,,2170
(1i9,3e20.9e3)
        1   -6.428449637E+000    2.069072881E+001    3.333333333E+000
        2   -6.428449637E+000    2.069072881E+001    1.666666667E+000
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-1
/com,*********** Elements for Body 1 "Solid" ***********
et,1,186
keyo,1,2,1          ! set full integration on SOLID186
eblock,19,solid,,303
(19i9)
        1        1        1        1        0        0        0        0       20        0        1        1      505      420      408      183      508      418      417
      578     1726     1710      577     1238     1723     1721     1237      576     1867     1722     1709
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-1
/com,*********** Send User Defined Coordinate System(s) ***********
local,12,1,0.,0.,0.,-0.,0.,0.
csys,0
toffst,273.15,  ! Temperature offset from absolute zero
/com,*********** Set Reference Temperature ***********
tref,22.
/com,*********** Send Materials ***********
MP,DENS,1,7.85e-09,	! tonne mm^-3
MP,ALPX,1,1.2e-05,	! C^-1
MP,C,1,434000000,	! mm^2 s^-2 C^-1
MP,KXX,1,60.5,	! tonne mm s^-3 C^-1
MP,RSVX,1,0.00017,	! ohm mm
MP,EX,1,200000,	! tonne s^-2 mm^-1
MP,NUXY,1,0.3,
MP,MURX,1,10000,

!************************* Model Summary ********************
!Solid,	Structural Steel,	matid,	1
!************************* End Model Summary ********************
/com,*********** Send Named Selection as Node Component ***********
CMBLOCK,LOW     ,NODE,       40
(8i10)
       265       266       267       303       418       419       420       504
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
/com,*********** Send Named Selection as Node Component ***********
CMBLOCK,HIGH    ,NODE,       40
(8i10)
       292       293       294       295       410       421       422       423
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
/com,*********** Send Named Selection as Node Component ***********
CMBLOCK,DIRICHLET,NODE,      106
(8i10)
       295       296       297       298       299       300       301       302
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/com,*********** Send Named Selection as Node Component ***********
CMBLOCK,TOP_LOW ,NODE,       40
(8i10)
       268       269       270       321       390       391       392       495
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
/com,*********** Send Named Selection as Node Component ***********
CMBLOCK,TOP_HIGH,NODE,       40
(8i10)
       323       324       325       326       327       328       329       330
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
/com,*********** Send Named Selection as Node Component ***********
CMBLOCK,TOP     ,NODE,      205
(8i10)
       305       306       307       308       309       310       311       312
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/com,*********** Fixed Supports ***********
CMBLOCK,_FIXEDSU,NODE,      106
(8i10)
       295       296       297       298       299       300       301       302
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cmsel,s,_FIXEDSU
