/BATCH
/NOPR
/COM, ICEM-ANSYS INTERFACE - Version 16.0 -
/CONFIG,NPROC,1
/PREP7
/NOLIST
NBLOCK ,6,SOLID
(3i8,6e16.9)
       1       0       0-6.428449415E-03 2.069072798E-02 3.333333414E-03
       2       0       0-6.428449415E-03 2.069072798E-02 1.666666707E-03
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N ,R5.3,LOC,     -1
CMBLOCK,SOLID_1_1_SOLID,NODE,572
(8i10)
         1         2         3         4         5         6         7         8
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CMBLOCK,LOW,NODE,16
(8i10)
       265       266       267       303       418       419       420       504
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CMBLOCK,HIGH,NODE,16
(8i10)
       292       293       294       295       410       421       422       423
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CMBLOCK,DIRICHLET,NODE,40
(8i10)
       295       296       297       298       299       300       301       302
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CMBLOCK,TOP_LOW,NODE,16
(8i10)
       268       269       270       321       390       391       392       495
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CMBLOCK,TOP_HIGH,NODE,16
(8i10)
       323       324       325       326       327       328       329       330
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CMBLOCK,TOP,NODE,76
(8i10)
       305       306       307       308       309       310       311       312
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CMBLOCK,SOLID_1_1,NODE,376
(8i10)
       123       124       125       126       127       128       129       130
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/GOLIST
NSEL,ALL
ESEL,ALL
DOFSEL,ALL
CMSEL,ALL
FINISH
SAVE
/GOPR
/SOLU
