*************************************
*HEADING
ICEM - ABAQUS INTERFACES VERSION 4.3.1
*************************************
*NODE, NSET=All
1, 2.22222228E-003, 8.00000038E-003, 1.66666671E-003
2, 2.22222228E-003, 8.00000038E-003, 3.33333341E-003
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*ELEMENT,TYPE=C3D8,ELSET=SYS_1_1_SOLID_ELSET
         1,         1,       206,       215,       217,        96,       210,       216,       240
         2,         1,       217,       215,       206,         2,       225,       214,       202
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*NSET,NSET=SYS_1_1_SOLID_NSET
         1,         2,         3,         4,         5,         6
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*NSET,NSET=FACEWITHFORCES_NSET
       137,       138,       139,       140,       141,       142
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*NSET,NSET=FACEDIRICHLETBOUNDARY_NSET
       151,       152,       153,       154,       155,       156
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*NSET,NSET=FACEFORCEFORPRESTRESS_NSET
        97,        98,        99,       100,       101,       102
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*NSET,NSET=SYS_1_1_NSET
        65,        66,        67,        68,        69,        70
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

*Material, name =STEEL
*ELASTIC
2e11, 0.3
*DENSITY
7850.0
*Solid Section, elset =SYS_1_1_SOLID_ELSET, material = STEEL
*NSET,NSET=Nall,GENERATE
1,240

*STEP
*FREQUENCY, SOLVER=MATRIXSTORAGE
30
*NODE OUTPUT
U
*END STEP
