*************************************
*HEADING
ICEM - ABAQUS INTERFACES VERSION 4.3.1
*************************************
*NODE, NSET=All
1, 5.55555569E-004, 9.44444444E-003, 5.55555569E-004
2, 5.55555569E-004, 9.44444444E-003, 1.11111114E-003
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*ELEMENT,TYPE=C3D8,ELSET=SYS_1_1_SOLID_ELSET
         1,         1,      6673,      6714,      6716,      5355,      6690,      6715,      7030
         2,         1,      6716,      6714,      6673,         2,      6751,      6713,      6656
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*ELEMENT,TYPE=S4,ELSET=FACEWITHFORCES_ELSET
      5833,      6707,      6554,      5987,      5986
      5834,      6708,      6571,      6554,      6707
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*ELEMENT,TYPE=S4,ELSET=FACEDIRICHLETBOUNDARY_ELSET
      5995,      6195,      6059,      6228,      6229
      5996,      6196,      6067,      6059,      6195
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*ELEMENT,TYPE=S4,ELSET=FACEFORCEFORPRESTRESS_ELSET
      6157,      5987,      5356,      5985,      5986
      6158,      5988,      5391,      5356,      5987
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*ELEMENT,TYPE=S4,ELSET=SYS_1_1_ELSET
      6805,      6714,      6716,      7030,      6715
      6806,      6713,      6751,      6716,      6714
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*NSET,NSET=SYS_1_1_SOLID_NSET
         1,         2,         3,         4,         5,         6
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*NSET,NSET=FACEWITHFORCES_NSET
      5986,      5987,      5988,      5989,      5990,      5991
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*NSET,NSET=FACEDIRICHLETBOUNDARY_NSET
      6040,      6041,      6042,      6043,      6044,      6045
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*NSET,NSET=FACEFORCEFORPRESTRESS_NSET
      5356,      5357,      5358,      5359,      5360,      5361
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*NSET,NSET=SYS_1_1_NSET
      4761,      4762,      4763,      4764,      4765,      4766
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
*BOUNDARY
FACEDIRICHLETBOUNDARY_NSET, 1
*BOUNDARY
FACEDIRICHLETBOUNDARY_NSET, 2
*BOUNDARY
FACEDIRICHLETBOUNDARY_NSET, 3
*Material, name =STEEL
*ELASTIC
200000000000, 0.3
*DENSITY
7850
*Solid Section, elset =SYS_1_1_SOLID_ELSET, material = STEEL
*STEP
*STATIC
*DLOAD
*MODEL2_ONEPART_1_1_SOLID_ELSET,centrif, 3.08e8, 0.,0.,0.,0.,0.,1.
*ENDSTEP
