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/batch
! ANSYS input file written by Workbench version 18.1 RELEASE
! File used for geometry attach: C:\Projects\data\workbench_files\beam_export_matrix_files\dp0\Geom\DM\Geom.agdb
/title,beam_export_matrix--Modal (B5)
/com,--- Data in consistent NMM units. See Solving Units in the help system for more information.
/units,MPA
/prep7
! Turn off shape checking because checks already performed inside WB mesher.
! See help system for more information.
SHPP,OFF,,NOWARN
etcon,set             ! allow ANSYS to choose best KEYOP's for 180x elements
/com,*********** Nodes for the whole assembly ***********
nblock,3,,61
(1i9,3e20.9e3)
        1    1.500000000E+001    0.000000000E+000    0.000000000E+000
        2    1.500000000E+001    0.000000000E+000    1.250000000E+001
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-1
/com,*********** Elements for Body 1 "Solid" ***********
et,1,186
keyo,1,2,1          ! set full integration on SOLID186
eblock,19,solid,,4
(19i9)
        1        1        1        1        0        0        0        0       20        0        1        1        6        7        2       19       14       13       18
       22       35       25       21       51       49       50       56       23       36       38       26
        1        1        1        1        0        0        0        0       20        0        2        2        7        8        3       18       13       12       17
       25       37       28       24       50       47       48       55       26       38       40       29
        1        1        1        1        0        0        0        0       20        0        3        3        8        9        4       17       12       11       16
       28       39       31       27       48       44       46       53       29       40       42       32
        1        1        1        1        0        0        0        0       20        0        4        4        9       10        5       16       11       15       20
       31       41       33       30       46       45       52       54       32       42       43       34
-1
/com,*********** Send User Defined Coordinate System(s) ***********
csys,0
toffst,273.15,  ! Temperature offset from absolute zero
/com,*********** Set Reference Temperature ***********
tref,22.
/com,*********** Send Materials ***********
MP,DENS,1,7.85e-09,	! tonne mm^-3
MP,ALPX,1,1.2e-05,	! C^-1
MP,C,1,434000000,	! mm^2 s^-2 C^-1
MP,KXX,1,60.5,	! tonne mm s^-3 C^-1
MP,RSVX,1,0.00017,	! ohm mm
MP,EX,1,200000,	! tonne s^-2 mm^-1
MP,NUXY,1,0.3,
MP,MURX,1,10000,

!************************* Model Summary ********************
!Solid,	Structural Steel,	matid,	1
!************************* End Model Summary ********************
/com,*********** Fixed Supports ***********
CMBLOCK,_FIXEDSU,NODE,       16
(8i10)
         1         5         6        10        14        15        19        20
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
cmsel,s,_FIXEDSU
d,all,all
nsel,all
fini
/solu
antype,2                   ! modal analysis
modopt,lanb,8
outres,erase
outres,all,none
outres,nsol,all
mxpand                    ! default expand in case of complex solution
! *********** WB SOLVE COMMAND ***********
! check interactive state
*get,ANSINTER_,active,,int
*if,ANSINTER_,ne,0,then
/eof
*endif
solve
/com *************** Write FE CONNECTORS *********
CEWRITE,file,ce,,INTE
*get,_nmodalsolproc,active,0,numcpu
fini
/post1
*dim,_direction,CHAR,6,1
_direction(1) = 'X'
_direction(2) = 'Y'
_direction(3) = 'Z'
_direction(4) = 'ROTX'
_direction(5) = 'ROTY'
_direction(6) = 'ROTZ'
*get,_lastLS,active,0,set,LSTP
*get,_beginset,active,0,set,nset,first,_lastLS
*get,_endset,active,0,set,nset,last,_lastLS
_nummodes = _endset - _beginset + 1
*do,i_mode,1,_nummodes
   *do,j_component,1,6
			*get,PFACT_%i_mode%_%j_component%,MODE,%i_mode%,PFACT,,DIREC,_direction(%j_component%)
   *enddo
*enddo
! ****** Begin Command Snippet ******
!   Commands inserted into this file will be executed immediately after the ANSYS /POST1 command.

!   Active UNIT system in Workbench when this object was created:  Metric (mm, t, N, s, mV, mA)
!   NOTE:  Any data that requires units (such as mass) is assumed to be in the consistent solver unit system.
!                See Solving Units in the help system for more information.


!*DMAT, MatKD,D, import, full, file.full, STIFF
!*print, MatKD, Kdense2.matrix

! READ THE MAPPING TABLE: INTERNAL -> BCS
*DMAT,Nod2Bcs, D,IMPORT,FULL,file.full, NOD2BCS
*print, Nod2Bcs, IDmatrix.matrix


! ****** End   Command Snippet ******
fini
